3.52*x + C  # x
x := -1.1979
(-8.25)
C := 29.04
y := 3.52*x + C
y := 3.52*x + 29.04
y := 6806.25 - 100*x^2/68.0625
f(x) := 100*x^2 + 239.58*x - 4829.71
d/dx(100*x^2) + 239.58*x - 4829.71
f'(x) := 200*x + 239.58
